** written by FreeCAD inp file writer for CalculiX,Abaqus meshes
** highest dimension mesh elements only.

** Nodes
*Node, NSET=Nall
1, 0, 0, 10
2, 0, 0, 0
3, 0, 50, 10
4, 0, 50, 0
5, 600, 0, 10
6, 600, 0, 0
7, 600, 50, 10
8, 600, 50, 0
9, 0, 0, 5
10, 0, 25, 10
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

** Volume elements
*Element, TYPE=C3D10, ELSET=Evolumes
173, 17, 36, 37, 251, 96, 46, 99, 253, 252, 254
174, 37, 18, 17, 251, 100, 27, 99, 254, 255, 253
175, 36, 135, 195, 251, 257, 256, 211, 252, 258, 259
176, 192, 82, 7, 133, 209, 92, 206, 261, 260, 262
177, 75, 74, 135, 195, 84, 263, 264, 216, 213, 256
178, 55, 194, 4, 136, 266, 265, 64, 146, 267, 143
179, 21, 199, 22, 140, 269, 268, 31, 170, 270, 171
180, 60, 199, 59, 140, 272, 271, 69, 179, 270, 174
181, 41, 196, 42, 137, 235, 234, 51, 274, 273, 275
182, 193, 44, 43, 134, 244, 53, 245, 277, 276, 278
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
** Define element set Eall
*ELSET, ELSET=Eall
Evolumes


***********************************************************
** Element sets for materials and FEM element type (solid, shell, beam, fluid)
** written by write_element_sets_material_and_femelement_type function
*ELSET,ELSET=MaterialSolidSolid
Evolumes

***********************************************************
** constraints fixed node sets
** written by write_node_sets_constraints_fixed function
** ConstraintFixed
*NSET,NSET=ConstraintFixed
1,
2,
3,
4,
9,
10,
11,
12,
93,

***********************************************************
** constraints displacement node sets
** written by write_node_sets_constraints_displacement function
** ConstraintDisplacement
*NSET,NSET=ConstraintDisplacement
5,
6,
7,
8,
13,
14,
15,
16,
94,

***********************************************************
** Materials
** written by write_materials function
** Young's modulus unit is MPa = N/mm2
** FreeCAD material name: St E 500
** MaterialSolid
*MATERIAL, NAME=MaterialSolid
*ELASTIC
210000, 0.300

***********************************************************
** Sections
** written by write_femelementsets function
*SOLID SECTION, ELSET=MaterialSolidSolid, MATERIAL=MaterialSolid

*STEP, INC=1000000
*Static
1e-05,1.0,1e-08,0.1
*RESTART, WRITE
*BOUNDARY
ConstraintDisplacement,1,1,-0.21636094193955246
*BOUNDARY
ConstraintDisplacement,3,3,-0.6368423236121175
*BOUNDARY
ConstraintFixed,1,3,0
*NODE FILE
U
*NODE PRINT, NSET=ConstraintDisplacement,Totals=Only
RF
*NODE PRINT, NSET=ConstraintFixed,Totals=Only
RF
*END STEP
